Simulations: Version=214
  Simulation
    Weather: FileName=weather.met
    Clock: Start=2023-01-01; End=2024-12-31
    MicroClimate: a_interception=0; b_interception=1; c_interception=0; d_interception=0; SoilHeatFluxFraction=0.4; MinimumHeightDiffForNewLayer=0; NightInterceptionFraction=0.5; ReferenceHeight=2
    Summary
    Zone Block: Area=1; Slope=0; AspectAngle=0; Altitude=50
      Fertiliser
      SurfaceOrganicMatter SurfaceOM: InitialResidueName=oilpalm; InitialResidueType=oilpalm; InitialResidueMass=0; InitialStandingFraction=0; InitialCPR=0; InitialCNR=0
      Soil: SoilType=Higaturu Series; Site=Sangara Estate; NearestTown=Popondetta; Region=Oro Province; Country=PNG; Latitude=0; Longitude=0
        Physical
          Thickness  BD    AirDry  LL15   DUL    SAT
          100        1.22  0.127   0.38   0.48   0.53
          200        1.22  0.127   0.38   0.48   0.53
          300        1.43  0.1     0.3    0.4    0.45
          300        1.14  0.137   0.41   0.51   0.56
          300        1.15  0.135   0.406  0.506  0.556
          300        1.15  0.135   0.406  0.506  0.556
          500        1.43  0.1     0.3    0.4    0.45
          500        1.43  0.1     0.3    0.4    0.45
          500        1.43  0.1     0.3    0.4    0.45
          500        1.43  0.1     0.3    0.4    0.45
          500        1.43  0.1     0.3    0.4    0.45
          1000       1.43  0.1     0.3    0.4    0.45
          SoilCrop OilPalmSoil
            LL=[0.38, 0.38, 0.3, 0.41, 0.406, 0.406, 0.3, 0.3, 0.3, 0.3, 0.3, 0.3]
            KL=[0.06, 0.04, 0.03, 0.02, 0.02, 0.02, 0.01, 0.01, 0.01, 0, 0, 0]
            XF=[1, 1, 1, 1, 1, 1, 1, 1, 1, 0, 0, 0]
        WaterBalance SoilWater: SummerDate=1-Nov; SummerU=5; SummerCona=5; WinterDate=1-Apr; WinterU=5; WinterCona=5; DiffusConst=88; DiffusSlope=35.4; Salb=0.18; CN2Bare=68; CNRed=20; CNCov=0.8; DischargeWidth=0; CatchmentArea=0; PSIDul=-100
          Thickness  SWCON  KLAT
          100        0.7    0
          200        0.7    0
          300        0.7    0
          300        0.7    0
          300        0.7    0
          300        0.7    0
          500        0.5    0
          500        0.5    0
          500        0.5    0
          500        0.5    0
          500        0.5    0
          1000       0.5    0
        Organic: FOMCNRatio=30; CarbonUnits=Total
          Thickness  Carbon  SoilCNRatio  FBiom  FInert  FOM
          100        2.1     12           0.04   0.24    532.719
          100        1.06    12           0.03   0.47    501.696
          100        0.65    12           0.015  0.77    472.479
          300        0.5     12           0.01   0.95    394.648
          300        0.4     12           0.01   0.99    329.638
          600        0.4     12           0.01   0.99    229.98
          500        0.4     12           0.01   0.99    170.374
          500        0.4     12           0.01   0.99    126.216
          500        0.4     12           0.01   0.99    93.5031
          500        0.4     12           0.01   0.99    69.2688
          500        0.4     12           0.01   0.99    51.3156
          1000       0.4     12           0.01   0.99    28.1626
        Chemical: PHUnits=Water
          Thickness=[100, 200, 300, 300, 300, 300, 500, 500, 500, 500, 500, 1000]
          PH=[6.3, 6.4, 6.7, 6.8, 6.8, 6.8, 6.8, 6.8, 6.8, 6.8, 6.8, 6.8]
        Water: FilledFromTop=false
          Thickness=[100, 200, 300, 300, 300, 300, 500, 500, 500, 500, 500, 1000]
          InitialValues=[0.48, 0.48, 0.4, 0.51, 0.506, 0.506, 0.4, 0.4, 0.4, 0.4, 0.4, 0.4]
        Nutrient
        Solute NO3: InitialValues=[5, 5, 1, 1, 1, 0, 0, 0, 0, 0, 0, 0]; InitialValuesUnits=ppm; WaterTableConcentration=0; D0=0; DepthConstant=0; MaxDepthSoluteAccessible=0; RunoffEffectivenessAtMovingSolute=0; MaxEffectiveRunoff=0
          Thickness=[100, 200, 300, 300, 300, 300, 500, 500, 500, 500, 500, 1000]
        Solute NH4: InitialValues=[0, 0, 0, 0, 0, 0, 0, 0, 0, 0, 0, 0]; InitialValuesUnits=ppm; WaterTableConcentration=0; D0=0; DepthConstant=0; MaxDepthSoluteAccessible=0; RunoffEffectivenessAtMovingSolute=0; MaxEffectiveRunoff=0
          Thickness=[100, 200, 300, 300, 300, 300, 500, 500, 500, 500, 500, 1000]
        Solute Urea: InitialValues=[0, 0, 0, 0, 0, 0, 0, 0, 0, 0, 0, 0]; InitialValuesUnits=kg/ha; WaterTableConcentration=0; D0=0; DepthConstant=0; MaxDepthSoluteAccessible=0; RunoffEffectivenessAtMovingSolute=0; MaxEffectiveRunoff=0
          Thickness=[100, 200, 300, 300, 300, 300, 500, 500, 500, 500, 500, 1000]
        SoilTemperature Temperature: InteractionsPerDay=8
      Report AnnualOutput: EventNames=[Clock].EndOfYear
        VariableNames:
          [Clock].Today
          [Clock].Today.Year
          [OilPalm].Age
          [OilPalm].LAI
          sum of [Weather].Rain from 1-Jan to 31-Dec as AnnualRain
          sum of [Soil].SoilWater.Eo from 1-Jan to 31-Dec as AnnualPotentialEvaporation
          sum of [Irrigation].IrrigationApplied from 1-Jan to 31-Dec as AnnualIrrigation
          sum of [Fertiliser].NitrogenApplied from 1-Jan to 31-Dec as AnnualFertiliserNAdded
          sum of [Soil].SoilWater.LeachNO3 from 1-Jan to 31-Dec as AnnualNLeaching
          sum of sum([Soil].Nutrient.Natm) from 1-Jan to 31-Dec as AnnualDenitrification
          sum of sum([Soil].Nutrient.N2Oatm) from 1-Jan to 31-Dec as AnnualN2O
          sum of ([OilPalm].UnderstoryNFixation+[Fertiliser].NitrogenApplied) from 1-Jan to 31-Dec as AnnualTotalNInput
          [Calculations].Script.AnnualFronds
          [Calculations].Script.AnnualBunches
          [Calculations].Script.AnnualYield
          [Calculations].Script.AnnualBunchSize
          sum of [OilPalm].UnderstoryDltDM*10 from 1-Jan to 31-Dec as AnnualUnderstoryNPP
          sum of [OilPalm].UnderstoryNFixation from 1-Jan to 31-Dec as AnnualUnderstoryNFixation
          sum of sum([OilPalm].UnderstoryNUptake) from 1-Jan to 31-Dec as AnnualUnderstoryNUptake
          sum of sum([OilPalm].NitrogenUptake) from 1-Jan to 31-Dec as AnnualPalmNUptake
          sum of [OilPalm].RootGrowth*10 from 1-Jan to 31-Dec as AnnualRootNPP
          sum of [OilPalm].StemGrowth*10 from 1-Jan to 31-Dec as AnnualStemNPP
          sum of [OilPalm].FrondGrowth*10 from 1-Jan to 31-Dec as AnnualFrondNPP
          sum of [OilPalm].BunchGrowth*10 from 1-Jan to 31-Dec as AnnualBunchNPP
          sum of (([OilPalm].RootGrowth+[OilPalm].StemGrowth+[OilPalm].FrondGrowth+[OilPalm].UnderstoryDltDM)*10) from 1-Jan to 31-Dec as AnnualTotalVegetativeNPP
          sum of (([OilPalm].RootGrowth+[OilPalm].StemGrowth+[OilPalm].FrondGrowth)*10) from 1-Jan to 31-Dec as AnnualPalmVegetativeNPP
          sum of ([Soil].SoilWater.Es + [OilPalm].EP + [OilPalm].UnderstoryEP) from 1-Jan to 31-Dec as AnnualET
          [Calculations].Script.AnnualNRemoved
          mean of sum([Soil].NO3.kgha) from 1-Jan to 31-Dec as AnnualAverageNO3
          mean of [SurfaceOM].Wt from 1-Jan to 31-Dec as AnnualLitterMass
          mean of [SurfaceOM].N from 1-Jan to 31-Dec as AnnualLitterN
      Report DailyOutput: EventNames=[Clock].EndOfDay
        VariableNames:
          [Clock].Today
          [OilPalm].Age
          [OilPalm].LAI
          [Calculations].Script.AnnualFronds
          [Calculations].Script.AnnualBunches
          [Calculations].Script.AnnualYield
          [Calculations].Script.AnnualBunchSize
          [OilPalm].HarvestFFB
          [Weather].Rain
          [Soil].SoilWater.Eo
          [Soil].SoilWater.Es
          [OilPalm].EP
          [OilPalm].UnderstoryEP
          [Soil].NO3.kgha
          [SurfaceOM].Wt
          [SurfaceOM].N
          [OilPalm].RootGrowth
          [OilPalm].StemGrowth
          [OilPalm].FrondGrowth
          [OilPalm].BunchGrowth
      OilPalm: LAI=0; UnderstoryCoverMax=0.4; UnderstoryLegumeFraction=1; MaximumRootDepth=5000
      Irrigation
      Manager Palm Management
        sowing_date = 01/01/2023 00:00:00
        population = 135
        cultivar = Dami
        sowing_depth = 200
```csharp
using Models.Soils;
using System;
using System.Linq;
using Models.Core;
using Models.PMF;
using Models.PMF.OilPalm;
using Models.Surface;
using APSIM.Shared.Utilities;

namespace Models
{
    [Serializable]
    [System.Xml.Serialization.XmlInclude(typeof(Model))]
    public class Script : Model
    {
        [Link] Clock Clock; 
        [Link] OilPalm oilPalm;
        [Link] Summary Summary;
        [Link] SurfaceOrganicMatter surface;
        
        [Description("Sowing date")]
        public DateTime sowing_date {get; set;}
        
        [Description("Plant population /ha")]
        public double population {get; set;}


        [Description("Cultivar")]
        [Display(Type=DisplayType.CultivarName, PlantName = "OilPalm")]
        public string cultivar {get; set;}

        [Description("Sowing depth (mm)")]
        public double sowing_depth {get; set;}
        
        public double Plant_population {get;set;}
        
        private byte HarvestCounter = 1;

        [EventSubscribe("StartOfSimulation")]
        private void OnSimulationCommencing(object sender, EventArgs e)
        {
            Plant_population = 0;
            surface.Add(24000, 270.769, 0, "oilpalm", "oilpalm");
            surface.Add(63000, 191.172, 0, "oilpalmstem", "oilpalmstem");
        }
        
        [EventSubscribe("DoManagement")]
        private void OnDoManagement(object sender, EventArgs e)
        {    
            if (Clock.Today.Date == sowing_date)
            {
                oilPalm.Sow(population: population / 10000, cultivar:cultivar, depth:sowing_depth, rowSpacing:150);
            }
            
            if (HarvestCounter == 14)
            {
                oilPalm.Harvest();
                HarvestCounter = 1;
            }
            
            HarvestCounter++;
            
            //if (Clock.Today == new DateTime(2026,7,15))
              //  oilPalm.EndCrop();
        }
    }
}
```
      Manager Calculations
```csharp
using Models.Climate;
using Models.Surface;
using Models.Soils.Nutrients;
using Models.Soils;
using Models.PMF.OilPalm;
using Models.PMF;
using Models.Core;
using System;
using Models.Soils.Nutrients;

namespace Models
{ 
    [Serializable]
    [System.Xml.Serialization.XmlInclude(typeof(Model))]
    public class Script : Model
    {
        [Link] Clock Clock;
        [Link] OilPalm OilPalm;
        [Link] Soil Soil;
        [Link] SurfaceOrganicMatter SurfaceOM;
        [Link] Summary Summary;
        [Link] Fertiliser Fertiliser;
        [Link] Weather Weather;
        [Link] Irrigation Irrigation;
        
        public double Offset {get; set;}
        public double AnnualFronds {get; set;}
        public double AnnualBunches {get; set;}
        public double AnnualYield {get; set;}
        public double AnnualBunchSize {get; set;}
        public double surfaceom_wt_oilpalmstem {get; set;}
        public double surfaceom_wt_oilpalmunderstory {get; set;}
        public double OilPalmYield {get; set;}
        public double AnnualNRemoved {get; set;}

        [EventSubscribe("StartOfSimulation")]
        private void OnSimulationCommencing(object sender, EventArgs e)
        {
            Offset = 0;
            OilPalmYield = 0;
            AnnualFronds = 0;
            AnnualBunches = 0;
            AnnualBunchSize = 0;
            AnnualYield = 0;
            surfaceom_wt_oilpalmstem = 0;
            surfaceom_wt_oilpalmunderstory = 0;    
            AnnualNRemoved = 0;

        }
        

       [EventSubscribe("StartOfYear")]
       private void OnStartOfYear(object sender, EventArgs e)
       {
               Offset = OilPalm.CumulativeFrondNumber;
            AnnualYield = 0;
            AnnualBunches = 0;
            AnnualBunchSize = 0;
            AnnualNRemoved = 0;
        }
        
       [EventSubscribe("DoManagementCalculations")]
       private void OnDoManagement(object sender, EventArgs e)
        {
            surfaceom_wt_oilpalmstem = SurfaceOM.GetWeightFromPool("oilpalmstem");
            AnnualFronds = OilPalm.CumulativeFrondNumber - Offset;  
        }
        
        [EventSubscribe("Harvesting")]
        private void OnHarvesting(object sender, EventArgs e)
        {
            AnnualYield += OilPalm.HarvestFFB;
            AnnualBunches += OilPalm.HarvestBunches;
            if (AnnualBunches > 0)
                AnnualBunchSize = AnnualYield * 1000 / AnnualBunches / (OilPalm.Population * 10000);
            AnnualNRemoved += OilPalm.HarvestNRemoved;
        }
    }
}
```
      Report ClimSmartDaily: EventNames=[Clock].EndOfDay
        VariableNames:
          [Clock].Today
          [Weather].Rain
          [Weather].MaxT
          [Weather].MinT
          [Weather].Radn
          [OilPalm].LAI
          [OilPalm].FW
          [OilPalm].EP
          [Soil].SoilWater.Es
          sum([Soil].Water.MM) as SoilWaterMM
          [OilPalm].HarvestFFB
  DataStore
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